units		real
dimension       3
boundary  	f f f
atom_style	full


read_data	noshield.data
group           Substrate id <> 180 31431
group           Tip id < 181
group           Target id < 181
group           Nanoparticle id > 31430


pair_style      lj/cut/coul/cut 12.0 10.0
pair_coeff	1 1 0.0390 2.935 #Au
pair_coeff	2 2 0.3050 4.180 #C
pair_coeff	3 3 0.0100 3.200 #H
pair_coeff	4 4 0.4150 3.995 #N
pair_coeff	5 5 0.4150 3.710 #O
pair_coeff	6 6 0.2150 4.295 #P
pair_coeff	7 7 0.3050 3.769 #S
bond_style      harmonic
bond_coeff	1 350 1.530 #CC
bond_coeff	2 350 1.462 #CN
bond_coeff	3 350 1.420 #CO
bond_coeff	4 350 1.910 #CS
bond_coeff	5 350 1.022 #HN
bond_coeff	6 350 0.980 #HO
bond_coeff	7 350 1.540 #OP
angle_style     harmonic
angle_coeff	1 50 109.471 #C
angle_coeff	2 50 109.471 #C
angle_coeff	3 50 109.471 #C
angle_coeff	4 50 109.471 #C
angle_coeff	5 50 106.700 #N
angle_coeff	6 50 106.700 #N
angle_coeff	7 50 104.510 #O
angle_coeff	8 50 104.510 #O
angle_coeff	9 50 104.510 #O
angle_coeff	10 50 92.100 #S
angle_coeff	11 50 106.700 #N
angle_coeff	12 50 104.510 #O
angle_coeff	13 50 109.471 #C
angle_coeff	14 50 109.471 #C
angle_coeff	15 50 109.471 #C
angle_coeff	16 50 109.471 #C
angle_coeff	17 50 93.300 #P
dihedral_style	harmonic
dihedral_coeff	1 22.5 -1 2 #CC
dihedral_coeff	2 22.5 -1 2 #CC
dihedral_coeff	3 22.5 -1 2 #CC
dihedral_coeff	4 22.5 -1 2 #CC
dihedral_coeff	5 22.5 -1 2 #CN
dihedral_coeff	6 22.5 -1 2 #CN
dihedral_coeff	7 0 -1 2 #CO
dihedral_coeff	8 0 -1 2 #CO
dihedral_coeff	9 0 -1 2 #CO
dihedral_coeff	10 0 -1 2 #CS
dihedral_coeff	11 0 -1 2 #OP
dihedral_coeff	12 22.5 -1 2 #CC
dihedral_coeff	13 22.5 -1 2 #CC
dihedral_coeff	14 22.5 -1 2 #CC
dihedral_coeff	15 22.5 -1 2 #CN
dihedral_coeff	16 22.5 -1 2 #CN
dihedral_coeff	17 0 -1 2 #CO
dihedral_coeff	18 0 -1 2 #CS
dihedral_coeff	19 22.5 -1 2 #CC
dihedral_coeff	20 22.5 -1 2 #CC
dihedral_coeff	21 22.5 -1 2 #CN
dihedral_coeff	22 22.5 -1 2 #CN
dihedral_coeff	23 22.5 -1 2 #CN
delete_atoms    overlap 0.3 all all


fix             1 Tip spring/self 1000
fix             2 Substrate spring/self 1000
fix		        3 all nvt temp 310 310 0.01
thermo_style	custom step ke pe etotal
thermo          100
timestep	0.01
dump	        1 all xyz 10 InitialDump1.xyz
thermo_modify   lost ignore
thermo_modify   lost/bond ignore
run		10000


undump          1
unfix           3
reset_timestep 0
fix		        100 all nve
fix             4 Target move linear -0.05 0.0 0.0 units box
fix             5 Target setforce -0.2 0.0 0.0

compute stress all pressure thermo_temp
variable s1 equal c_stress[1]
variable s2 equal c_stress[2]
variable s3 equal c_stress[3]
variable s4 equal c_stress[6]
variable s5 equal c_stress[5]
variable s6 equal c_stress[4]

variable s11 equal v_s1*v_s1
variable s22 equal v_s2*v_s2
variable s33 equal v_s3*v_s3
variable s44 equal v_s4*v_s4
variable s55 equal v_s5*v_s5
variable s66 equal v_s6*v_s6
variable s33 equal v_s3*v_s3
variable s12 equal v_s1*v_s2
variable s13 equal v_s1*v_s3
variable s14 equal v_s1*v_s4
variable s15 equal v_s1*v_s5
variable s16 equal v_s1*v_s6
variable s23 equal v_s2*v_s3
variable s24 equal v_s2*v_s4
variable s25 equal v_s2*v_s5
variable s26 equal v_s2*v_s6
variable s34 equal v_s3*v_s4
variable s35 equal v_s3*v_s5
variable s36 equal v_s3*v_s6
variable s45 equal v_s4*v_s5
variable s46 equal v_s4*v_s6
variable s56 equal v_s5*v_s6

variable mytemp equal temp
variable mypress equal press
variable mype equal pe/atoms
fix avt all ave/time 100 5 1000 v_mytemp ave running
fix avp all ave/time 100 5 1000 v_mypress ave running
fix avpe all ave/time 100 5 1000 v_mype ave running
fix avs all ave/time 100 5 1000 v_s1 v_s2 v_s3 v_s4 v_s5 v_s6 ave running
fix avssq all ave/time 100 5 1000 &
v_s11 v_s22 v_s33 v_s44 v_s55 v_s66 &
v_s12 v_s13 v_s14 v_s15 v_s16 &
v_s23 v_s24 v_s25 v_s26 &
v_s34 v_s35 v_s36 &
v_s45 v_s46 &
v_s56 &
ave running

# bar to GPa
variable pconv equal 1.0e5/1.0e9
variable cunits index GPa
# metal unit constants from LAMMPS
# force->nktv2p = 1.6021765e6;
# force->boltz = 8.617343e-5;
variable boltz equal 8.617343e-5
variable nktv2p equal 1.6021765e6
variable vkt equal vol/(${boltz}*273)/${nktv2p}
variable ffac equal ${pconv}*${vkt}

variable F11 equal -(f_avssq[1]-f_avs[1]*f_avs[1])*${ffac}
variable F22 equal -(f_avssq[2]-f_avs[2]*f_avs[2])*${ffac}
variable F33 equal -(f_avssq[3]-f_avs[3]*f_avs[3])*${ffac}
variable F44 equal -(f_avssq[4]-f_avs[4]*f_avs[4])*${ffac}
variable F55 equal -(f_avssq[5]-f_avs[5]*f_avs[5])*${ffac}
variable F66 equal -(f_avssq[6]-f_avs[6]*f_avs[6])*${ffac}

variable F12 equal -(f_avssq[7]-f_avs[1]*f_avs[2])*${ffac}
variable F13 equal -(f_avssq[8]-f_avs[1]*f_avs[3])*${ffac}
variable F14 equal -(f_avssq[9]-f_avs[1]*f_avs[4])*${ffac}
variable F15 equal -(f_avssq[10]-f_avs[1]*f_avs[5])*${ffac}
variable F16 equal -(f_avssq[11]-f_avs[1]*f_avs[6])*${ffac}

variable F23 equal -(f_avssq[12]-f_avs[2]*f_avs[3])*${ffac}
variable F24 equal -(f_avssq[13]-f_avs[2]*f_avs[4])*${ffac}
variable F25 equal -(f_avssq[14]-f_avs[2]*f_avs[5])*${ffac}
variable F26 equal -(f_avssq[15]-f_avs[2]*f_avs[6])*${ffac}

variable F34 equal -(f_avssq[16]-f_avs[3]*f_avs[4])*${ffac}
variable F35 equal -(f_avssq[17]-f_avs[3]*f_avs[5])*${ffac}
variable F36 equal -(f_avssq[18]-f_avs[3]*f_avs[6])*${ffac}

variable F45 equal -(f_avssq[19]-f_avs[4]*f_avs[5])*${ffac}
variable F46 equal -(f_avssq[20]-f_avs[4]*f_avs[6])*${ffac}

variable F56 equal -(f_avssq[21]-f_avs[5]*f_avs[6])*${ffac}

# Born term

compute     virial all pressure NULL virial
compute     born all born/matrix numdiff 1.0e-4 virial
fix 	    avborn all ave/time 100 5 1000 c_born[*] ave running

variable bfac equal ${pconv}*${nktv2p}/vol
variable B vector f_avborn*${bfac}

# Kinetic term

variable kfac equal ${pconv}*${nktv2p}*atoms*${boltz}*273/vol
variable K11 equal 4.0*${kfac}
variable K22 equal 4.0*${kfac}
variable K33 equal 4.0*${kfac}
variable K44 equal 2.0*${kfac}
variable K55 equal 2.0*${kfac}
variable K66 equal 2.0*${kfac}

# Add F, K, and B together

variable C11 equal v_F11+v_B[1]+v_K11
variable C22 equal v_F22+v_B[2]+v_K22
variable C33 equal v_F33+v_B[3]+v_K33
variable C44 equal v_F44+v_B[4]+v_K44
variable C55 equal v_F55+v_B[5]+v_K55
variable C66 equal v_F66+v_B[6]+v_K66

variable C12 equal v_F12+v_B[7]
variable C13 equal v_F13+v_B[8]
variable C14 equal v_F14+v_B[9]
variable C15 equal v_F15+v_B[10]
variable C16 equal v_F16+v_B[11]

variable C23 equal v_F23+v_B[12]
variable C24 equal v_F24+v_B[13]
variable C25 equal v_F25+v_B[14]
variable C26 equal v_F26+v_B[15]

variable C34 equal v_F34+v_B[16]
variable C35 equal v_F35+v_B[17]
variable C36 equal v_F36+v_B[18]

variable C45 equal v_F45+v_B[19]
variable C46 equal v_F46+v_B[20]

variable C56 equal v_F56+v_B[21]


thermo_modify norm no

variable C11cubic equal (${C11}+${C22}+${C33})/3.0
variable C12cubic equal (${C12}+${C13}+${C23})/3.0
variable C44cubic equal (${C44}+${C55}+${C66})/3.0

variable bulkmodulus equal (${C11cubic}+2*${C12cubic})/3.0
variable shearmodulus1 equal ${C44cubic}
variable shearmodulus2 equal (${C11cubic}-${C12cubic})/2.0
variable poissonratio equal 1.0/(1.0+${C11cubic}/${C12cubic})

compute         MSD Nanoparticle msd average yes
compute         Force1 Nanoparticle group/group all pair yes
compute         Force2 Tip group/group all pair yes
compute         Strain Nanoparticle com
compute         mom Nanoparticle momentum


dump            myDump all atom 100 dump.lammpstrj
thermo_modify   lost ignore
thermo_modify   lost/bond ignore
thermo_modify norm no
thermo		1000
thermo_style custom step temp pe press density f_avt f_avp f_avpe v_F11 v_F22 v_F33 v_F44 v_F55 v_F66 v_F12 v_F13 v_F23 v_B[*8] v_B[12] c_Force1 c_Force2 c_Strain[2] c_MSD[1] c_MSD[2] c_MSD[3] c_MSD[4] c_mom[1] c_mom[2] c_mom[3]

run		15000

print "Elastic Constant C11 = ${C11} ${cunits}"
print "Elastic Constant C22 = ${C22} ${cunits}"
print "Elastic Constant C33 = ${C33} ${cunits}"

print "Elastic Constant C12 = ${C12} ${cunits}"
print "Elastic Constant C13 = ${C13} ${cunits}"
print "Elastic Constant C23 = ${C23} ${cunits}"

print "Elastic Constant C44 = ${C44} ${cunits}"
print "Elastic Constant C55 = ${C55} ${cunits}"
print "Elastic Constant C66 = ${C66} ${cunits}"

print "Elastic Constant C14 = ${C14} ${cunits}"
print "Elastic Constant C15 = ${C15} ${cunits}"
print "Elastic Constant C16 = ${C16} ${cunits}"

print "Elastic Constant C24 = ${C24} ${cunits}"
print "Elastic Constant C25 = ${C25} ${cunits}"
print "Elastic Constant C26 = ${C26} ${cunits}"

print "Elastic Constant C34 = ${C34} ${cunits}"
print "Elastic Constant C35 = ${C35} ${cunits}"
print "Elastic Constant C36 = ${C36} ${cunits}"

print "Elastic Constant C45 = ${C45} ${cunits}"
print "Elastic Constant C46 = ${C46} ${cunits}"
print "Elastic Constant C56 = ${C56} ${cunits}"

print "========================================="
print "Average properties"
print "========================================="

print "Bulk Modulus = ${bulkmodulus} ${cunits}"
print "Shear Modulus 1 = ${shearmodulus1} ${cunits}"
print "Shear Modulus 2 = ${shearmodulus2} ${cunits}"
print "Poisson Ratio = ${poissonratio}"
